# OpenSim document version 40500
MarkerSet:
  Marker HEADR: head (0.02801268 0.2125696 0.09688237)
  Marker HEADL: head (0.01810064 0.2111638 -0.09802764)
  Marker RSHO: torso (-0.004086599 0.4237935 0.154594)
  Marker LSHO: torso (0.001317717 0.4299604 -0.1488659)
  Marker HEADF: head (0.1321119 0.2227616 -0.002006723)
  Marker HEADFR: head (0.1255323 0.2209358 0.04405732)
  Marker HEADFL: head (0.1244272 0.2217802 -0.05140257)
  Marker STERNSUP: torso (0.08655569 0.3483256 0.001133675)
  Marker STERNINF: torso (0.1228332 0.2534229 0.001127488)
  Marker RASI: pelvis (0.01726431 0.05411728 0.117127)
  Marker LASI: pelvis (0.01564708 0.05175056 -0.1224253)
  Marker RFTC: femur_r (-0.01781875 -0.01438508 0.07908682)
  Marker LFTC: femur_l (-0.0249249 -0.008011946 -0.08350835)
  Marker RTH: femur_r (0.01117889 -0.2418998 0.07091039)
  Marker LTH: femur_l (-0.0009328975 -0.2473082 -0.07776877)
  Marker RFLE: femur_r (0.04023715 -0.3881004 0.04830192)
  Marker LFLE: femur_l (0.03402139 -0.3940601 -0.05239788)
  Marker RFME: femur_r (0.04990932 -0.3919113 -0.03973539)
  Marker LFME: femur_l (0.05729822 -0.3935432 0.03894025)
  Marker RTUB: tibia_r (0.06161355 -0.09204279 -0.001759796)
  Marker LTUB: tibia_l (0.05420332 -0.08924771 -0.005716302)
  Marker RSHN: tibia_r (0.05044844 -0.2370848 -0.00553264)
  Marker LSHN: tibia_l (0.04923252 -0.2370848 -0.002358004)
  Marker LELL: humerus_l (-0.001507214 -0.2826471 -0.04355162)
  Marker RELL: humerus_r (0.008180847 -0.2799183 0.04338158)
  Marker RELM: humerus_r (0.003855636 -0.2840934 -0.04619648)
  Marker LELM: humerus_l (0.005375883 -0.279973 0.0464572)
  Marker RUA: humerus_r (0.003440959 -0.1377682 0.03958016)
  Marker LUA: humerus_l (0.00486058 -0.1402005 -0.03415369)
  Marker RWRR: radius_r (-0.0078679 -0.238968 0.05397017)
  Marker LWRR: radius_l (-0.01158305 -0.238965 -0.0542863)
  Marker RWRU: radius_r (-0.01079763 -0.2405652 -0.02613911)
  Marker LWRU: radius_l (-0.01095128 -0.2373172 0.02410728)
  Marker RDMC2: hand_r (-0.02062161 -0.05278357 0.0009135876)
  Marker LDMC2: hand_l (-0.02292786 -0.05408372 0.008348977)
  Marker C7: torso (-0.0790748 0.4146003 0.001422453)
  Marker T10: torso (-0.1082201 0.2243266 -0.001221446)
  Marker RPSI: pelvis (-0.157474 0.05891199 0.05851193)
  Marker LPSI: pelvis (-0.1592862 0.06157198 -0.05812987)
  Marker RFA: ulna_r (-0.04832768 -0.1426602 0.02648579)
  Marker LFA: ulna_l (-0.04918624 -0.1428756 -0.03053824)
  Marker RLMAL: tibia_r (-0.006095936 -0.3910486 0.04329085)
  Marker LLMAL: tibia_l (-0.004486517 -0.3848569 -0.04537235)
  Marker RMMAL: tibia_r (-0.0002763323 -0.3858816 -0.02761013)
  Marker LMMAL: tibia_l (0.0009381483 -0.3827422 0.02835748)
  Marker RCAL2: calcn_r (-0.009926165 0.03178174 -0.004146129)
  Marker LCAL2: calcn_l (-0.01190753 0.03469604 0.007798845)
  Marker RCAL1: calcn_r (-0.01682689 0.00983115 -0.004214787)
  Marker LCAL1: calcn_l (-0.01429711 0.01064293 0.007518814)
  Marker RLCAL: calcn_r (0.01716217 0.02775444 0.02216217)
  Marker LLCAL: calcn_l (0.01906381 0.02885069 -0.02139885)
  Marker RMCAL: calcn_r (0.01854493 0.02544369 -0.03030644)
  Marker LMCAL: calcn_l (0.01533091 0.02770261 0.03052153)
  Marker RST: talus_r (0.006060419 -0.02082387 -0.03276805)
  Marker LST: talus_l (0.01020486 -0.02259506 0.03502582)
  Marker RTP: calcn_r (0.05319013 0.0169185 0.04133236)
  Marker LTP: calcn_l (0.05445815 0.01419669 -0.04268378)
  Marker RNAV: calcn_r (0.08818164 0.02270099 -0.04230513)
  Marker LNAV: calcn_l (0.08906461 0.02504535 0.04458351)
  Marker RMF: calcn_r (0.1102157 0.04621872 -0.00720129)
  Marker LMF: calcn_l (0.1100098 0.04401837 0.0006057088)
  Marker RCUB: calcn_r (0.08751206 0.01560076 0.04494794)
  Marker LCUB: calcn_l (0.08271642 0.01047343 -0.04805833)
  Marker RPMT1: calcn_r (0.1315527 0.03949178 -0.02611305)
  Marker LPMT1: calcn_l (0.1290149 0.04092754 0.02597582)
  Marker RMMT1: calcn_r (0.1598741 0.05345667 -0.02853076)
  Marker LMMT1: calcn_l (0.1602548 0.05205081 0.02676852)
  Marker RDMT1: calcn_r (0.1753523 0.02492753 -0.02736726)
  Marker LDMT1: calcn_l (0.1703925 0.02367826 0.02525248)
  Marker RDMT2: calcn_r (0.164623 0.02294841 -0.001597738)
  Marker LDMT2: calcn_l (0.1612221 0.02135465 0.0004807485)
  Marker RDMT5: calcn_r (0.132236 0.01696687 0.04167013)
  Marker LDMT5: calcn_l (0.1331888 0.01786718 -0.04218316)
  Marker RPMT5: calcn_r (0.1112196 0.01798125 0.04522193)
  Marker LPMT5: calcn_l (0.1072416 0.0167969 -0.04906184)
  Marker RMMT3: calcn_r (0.1324981 0.02854899 0.007149827)
  Marker LMMT3: calcn_l (0.1353698 0.03311197 -0.01018893)
  Marker RDMT3: calcn_r (0.1597275 0.02258292 0.01462917)
  Marker LDMT3: calcn_l (0.1539597 0.01789337 -0.01546255)
  Marker RPH: toes_r (0.01765345 0.01979288 -0.02527193)
  Marker LPH: toes_l (0.01570299 0.02228999 0.02323591)
  Marker RMH: toes_r (0.0398257 0.03350307 -0.0232005)
  Marker LMH: toes_l (0.03686 0.03268503 0.02067483)
  Marker RDH: toes_r (0.06199478 0.01623272 -0.020343)
  Marker LDH: toes_l (0.05881426 0.01771728 0.01937889)
